// COMSOL Multiphysics 5.6.0.401 model "AbsorptionCrossSection_nanohole.mph"
// Outline of the model tree

Parameters
  tf = 50[nm]  // Thickness of metal film
  ta = 5[nm]  // Thickness of adhesion layer
  di = 200[nm]  // Diameter of the nanohole
  Rbox = 3[um]  // Radius of the computation box
  Zbox = 1.5[um]  // Height of the computation box
  lambda = 700[nm]  // Wavelength in vacuum
  I0 = 1[mW/um^2]  // Irradiance
  Source = Rbox  // Radius of the source
  w0 = lambda/(2*n)  // Waist (gaussian distribution)
  n = 1.52  // index of input medium
  f0 = c_const/lambda  // Frequency
  k0 = 2*pi/lambda  // Wavevector (Vacuum)
  k = k0*n  // Wavevector (Input Medium)
  E0 = sqrt(2*I0/(c_const*n*epsilon0_const))  // Electric Field
  ResolFilm = 20[nm]  // Distance between 2 mesh points in the film (vertical)
  ResolMedium = 80[nm]  // Distance between 2 mesh points in the upper/lower medium (vertical)
  ResolSPP = 65[nm]  // Distance between 2 mesh points everywhere (radial)
  Seed = di-40[nm]  // Center of the hole (triangular mesh)
  NuFilm = ceil(tf/ResolFilm)  // Number of mesh slices in film
  NuMedium = ceil((Zbox/2)/ResolMedium)  // Number of mesh slices in medium
  NuFilmRadial = ceil((Rbox-di/2)/ResolSPP)  // Number of mesh rings (radial)

Geometry
  geom1 "Geometry 1" (3D, length unit µm)
    cyl1: Cylinder "Bottom Medium" | pos = {0, 0, -Zbox/2}; r = Rbox; h = Zbox/2
    cyl2: Cylinder "Adhesion layer" | r = Rbox; h = ta
    cyl3: Cylinder "Metal Film" | pos = {0, 0, ta}; r = Rbox; h = tf
    cyl4: Cylinder "Bottom Medium 1" | pos = {0, 0, tf+ta}; r = Rbox; h = Zbox/2
    cyl5: Cylinder "Nanohole" | r = di/2; h = tf+ta
    cyl6: Cylinder "Nanohole 1" | r = Seed/2; h = tf+ta
    pc1: ParametricCurve "MeshFilm" | parmax = Rbox; coord = {s, 0, 0}
    rot1: Rotate | contributeto = csel1; input = pc1; rot = range(0,22.5,350)
    fin: Finalize "Form Union"
    mce1: MeshControlEdges | input = selection csel1.edg

Materials
  mat1: Common "Au (Gold) (Johnson and Christy 1972: n,k 0.188-1.937 µm)" on domains 3
    def "Basic"
      relpermeability = 1
      electricconductivity = sigma_solid_1(T[1/K])[S/m]
      sigma_solid_1: Piecewise
        arg = T
        pieces = 
          {1.0, 25.0, 1/(3.010164E-14*T^3-3.409278E-13*T^2+1.027514E-12*T+2.194815E-10)}
          {25.0, 60.0, 1/(-2.773737E-14*T^3+4.182944E-12*T^2-1.228888E-10*T+1.390641E-09)}
          {60.0, 400.0, 1/(6.950205E-17*T^3-4.632985E-14*T^2+9.057611E-11*T-2.210068E-09)}
          {400.0, 1338.0, 1/(1.275961E-17*T^3-4.720065E-16*T^2+7.877041E-11*T-1.145028E-09)}
    RefractiveIndex
      n = n_interp(c_const/freq)
      ki = k_interp(c_const/freq)
      int1: Interpolation "Refractive index"
        funcname = n_interp
        table = 
          {1.879E-7, 1.28}
          {1.916E-7, 1.32}
          {1.953e-07, 1.34}
          {1.993E-7, 1.33}
          {2.033E-7, 1.33}
          {2.073E-7, 1.3}
          {2.119e-07, 1.3}
          {2.164E-7, 1.3}
          {2.214E-7, 1.3}
          {2.262E-7, 1.31}
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        interp = piecewisecubic
        argunit = m
        fununit = 1
      int2: Interpolation "Refractive index, imaginary part"
        funcname = k_interp
        table = 
          {1.879E-7, 1.188}
          {1.916E-7, 1.203}
          {1.953e-07, 1.226}
          {1.993E-7, 1.251}
          {2.033E-7, 1.277}
          {2.073E-7, 1.304}
          {2.119e-07, 1.35}
          {2.164E-7, 1.387}
          {2.214E-7, 1.427}
          {2.262E-7, 1.46}
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        interp = piecewisecubic
        argunit = m
        fununit = 1
  mat2: Common "Chromium (Cr) (Johnson and Christy 1974: n,k 0.188-1.937 µm)" on domains 2
    def "Basic"
      relpermeability = 1
      electricconductivity = sigma(T[1/K])[S/m]
      sigma: Piecewise | arg = T; pieces = {200.0, 1000.0, 1/(1.553278E-14*T^3-8.578376E-12*T^2+2.585171E-09*T-1.974938E-07)}
    RefractiveIndex
      n = n_interp(c_const/freq)
      ki = k_interp(c_const/freq)
      int1: Interpolation "Refractive index"
        funcname = n_interp
        table = 
          {1.88E-7, 1.28}
          {1.92E-7, 1.31}
          {1.95e-07, 1.35}
          {1.99E-7, 1.39}
          {2.03E-7, 1.43}
          {2.07E-7, 1.46}
          {2.12E-7, 1.46}
          {2.16e-07, 1.47}
          {2.21e-07, 1.45}
          {2.26e-07, 1.43}
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        interp = piecewisecubic
        argunit = m
        fununit = 1
      int2: Interpolation "Refractive index, imaginary part"
        funcname = k_interp
        table = 
          {1.88E-7, 1.64}
          {1.92E-7, 1.65}
          {1.95e-07, 1.68}
          {1.99E-7, 1.7}
          {2.03E-7, 1.7}
          {2.07E-7, 1.71}
          {2.12E-7, 1.72}
          {2.16e-07, 1.72}
          {2.21e-07, 1.73}
          {2.26e-07, 1.74}
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        interp = piecewisecubic
        argunit = m
        fununit = 1
  mat3: Common "Schott N-BK7®" on domains 1
    def "Basic"
      relpermeability = 1
      electricconductivity = 1E-14[S/m]
    RefractiveIndex
      n = n_interp(c_const/freq)
      ki = 0
      int1: Interpolation "n_interp"
        funcname = n_interp
        table = 
          {0.3000, 1.5527702635739}
          {0.3220, 1.5458699289209}
          {0.3440, 1.5404466868331}
          {0.3660, 1.536090527917}
          {0.3880, 1.53252773217}
          {0.4100, 1.529568767224}
          {0.4320, 1.5270784291406}
          {0.4540, 1.5249578457324}
          {0.4760, 1.5231331738499}
          {0.4980, 1.5215482528369}
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        argunit = um
    DispersionModelSellmeierStandard "Sellmeier"
      ODsma = {1.03961212, 0.231792344, 1.01046945, 0.00600069867, 0.0200179144, 103.560653}
      Trefsma = 22[degC]
      Prefsma = 1[atm]
    ThermoOpticDispersionModelSchott "Schott thermo-optic"
      TOsco = {1.86e-06, 1.31e-08, -1.37e-11, 4.34e-07, 6.27e-10, 0.17}
      Trefsco = 20[degC]
  mat5: Common "Water, liquid" on domains 4-8
    def "Basic"
      thermalexpansioncoefficient = alpha_p(T)
      bulkviscosity = muB(T)
      dynamicviscosity = eta(T)
      ratioofspecificheat = gamma_w(T)
      electricconductivity = 5.5e-6[S/m]
      heatcapacity = Cp(T)
      density = rho(T)
      thermalconductivity = k(T)
      soundspeed = cs(T)
      relpermeability = 1
      relpermittivity = nWater2(c_const/freq)^2
      eta: Piecewise
        arg = T
        pieces = 
          {273.15, 413.15, 1.3799566804-0.021224019151*T^1+1.3604562827E-4*T^2-4.6454090319E-7*T^3+8.9042735735E-10*T^4-9.0790692686E-13*T^5+3.8457331488E-16*T^6}
          {413.15, 553.75, 0.00401235783-2.10746715E-5*T^1+3.85772275E-8*T^2-2.39730284E-11*T^3}
        argunit = K
        fununit = Pa*s
      Cp: Piecewise | arg = T; pieces = {273.15, 553.75, 12010.1471-80.4072879*T^1+0.309866854*T^2-5.38186884E-4*T^3+3.62536437E-7*T^4}; argunit = K; fununit = J/(kg*K)
      rho: Piecewise
        arg = T
        smooth = contd1
        pieces = 
          {273.15, 293.15, 6.3092789034e-05*T^3-0.0603676398829*T^2+18.9229382407066*T-950.704055329848}
          {293.15, 373.15, 1.0335053319e-05*T^3-0.0133950656345*T^2+4.96928883266*T+432.257114008512}
        argunit = K
        fununit = kg/m^3
      k: Piecewise | arg = T; pieces = {273.15, 553.75, -0.869083936+0.00894880345*T^1-1.58366345E-5*T^2+7.97543259E-9*T^3}; argunit = K; fununit = W/(m*K)
      cs: Interpolation | table = {{273, 1403}, {278, 1427}, {283, 1447}, {293, 1481}, {303, 1507}, {313, 1526}, {323, 1541}, {333, 1552}, {343, 1555}, {353, 1555}, {363, 1550}, {373, 1543}}; interp = piecewisecubic; argunit = K; fununit = m/s
      an1: Analytic | funcname = alpha_p; expr = -1/rho(T)*d(rho(T),T); args = T; argunit = K; fununit = 1/K
      an2: Analytic | funcname = gamma_w; expr = 1+(T/Cp(T))*(alpha_p(T)*cs(T))^2; args = T; argunit = K; fununit = 1
      an3: Analytic | funcname = muB; expr = 2.79*eta(T); args = T; argunit = K; fununit = Pa*s
      int2: Interpolation "nWater2"
        funcs = {int1, 1}
        funcname = nWater2
        table = 
          {0.2, 1.396}
          {0.225, 1.373}
          {0.25, 1.362}
          {0.275, 1.354}
          {0.3, 1.349}
          {0.325, 1.346}
          {0.35, 1.343}
          {0.375, 1.341}
          {0.4, 1.339}
          {0.425, 1.338}
          {0.45, 1.337}
          {0.475, 1.336}
          {0.5, 1.335}
          {0.525, 1.334}
          {0.575, 1.333}
          {0.625, 1.332}
          {0.675, 1.331}
          {0.75, 1.33}
          {0.825, 1.329}
          {0.9, 1.328}
          {0.975, 1.327}
          {1.2, 1.324}
          {1.4, 1.321}
          {1.6, 1.317}
          {1.8, 1.312}
          {2, 1.306}
        argunit = um
    RefractiveIndex
      n = nWater(c_const/freq)
      ki = 0
      int1: Interpolation "nWater"
        funcname = nWater
        table = 
          {0.2, 1.396}
          {0.225, 1.373}
          {0.25, 1.362}
          {0.275, 1.354}
          {0.3, 1.349}
          {0.325, 1.346}
          {0.35, 1.343}
          {0.375, 1.341}
          {0.4, 1.339}
          {0.425, 1.338}
          {0.45, 1.337}
          {0.475, 1.336}
          {0.5, 1.335}
          {0.525, 1.334}
          {0.575, 1.333}
          {0.625, 1.332}
          {0.675, 1.331}
          {0.75, 1.33}
          {0.825, 1.329}
          {0.9, 1.328}
          {0.975, 1.327}
          {1.2, 1.324}
          {1.4, 1.321}
          {1.6, 1.317}
          {1.8, 1.312}
          {2, 1.306}
        argunit = um

Physics
  emw: ElectromagneticWaves "Electromagnetic Waves, Frequency Domain" on all domains
    dependent variable E = {Ex, Ey, Ez}
    wee1: WaveEquationElectric (default) | DisplacementFieldModel = RefractiveIndex
    pec1: PerfectElectricConductor (default)
    init1: init "Initial Values 1" (default)
    sctr1: Scattering "Scattering Boundary Condition 1" on boundaries 1-43
    sctr2: Scattering "Incident Field - collimated" on boundaries 3
      IncidentField = EField
      E0i = {if(sqrt(x*x+y*y)<Source, E0, 0), 0, 0}
    sctr3: Scattering "Incident Field - Gaussian" (disabled) on boundaries 3
      IncidentField = EField
      E0i = {E0*exp(-(x^2+y^2)/w0^2), 0, 0}

Mesh
  mesh1 "Mesh 1"
    size: MeshSizeDefault | hmax = 0.6; hmin = 0.108; hcurve = 0.6; hnarrow = 0.5; hgrad = 1.5
    dis1: Distribution "SliceFilmZ" on edges 7, 18, 26, 35, 42, 47, 52, 57, 64, 70, 72, 75 | numelem = NuFilm
    dis2: Distribution "SlliceAdLayerZ" on edges 4, 15, 23, 33, 40, 45, 50, 55, 62, 69, 71, 74 | numelem = 2
    dis3: Distribution "SliceMediaZ" on edges 1, 10, 31, 37, 60, 66, 73, 76 | numelem = NuMedium
    dis4: Distribution "SliceTheta" on edges 5, 6, 34, 63, 77-82, 95-97, 110-112 | numelem = 1
    dis5: Distribution "SliceFilmR" on edges 113-119, 134, 146, 149, 150, 153, 154, 158-160
      type = predefined
      elemcount = NuFilmRadial
    map1: Map "MapFilmZ" on boundaries 4, 5, 7, 8, 14, 15, 17, 18, 21, 22, 24, 25, 29, 30, 32-39, 41, 42
    dis6: Distribution "OnlyOne" on edges 120-133, 135-145, 147, 148, 151, 152, 155-157 | numelem = 1
    ftri1: FreeTri "MapSeedR" on boundaries 23, 74-88
    map2: Map "MapSurfaceR" on boundaries 6, 16, 44-73
    map3: Map "MapMediumZ" on boundaries 1, 2, 10, 11, 28, 31, 40, 43
    swe1: Sweep "FillHole" on domains 5-8
    swe2: Sweep "FillFilm" on domains 2, 3
    swe3: Sweep "FillBottomMedium" on domains 1
    swe4: Sweep "FillTopMedium" on domains 4

Studies
  std1 "Study 1"
    freq: Frequency "Frequency Domain" | punit = Hz; plist = f0

Solver configurations
  sol1 "Solution 1" (study std1)
    v1: Variables "Dependent Variables 1"
    s1: Stationary "Stationary Solver 1" | stol = 0.01
      p1: Parametric | pname = freq; plistarr = f0; punit = Hz; pcontinuationmode = no
      fc1: FullyCoupled | linsolver = dDef
      dDef: Direct

Datasets
  dset1: Solution | solution = sol1
  cpl1: CutPlane "Cut Plane YZ" | data = dset1
  cpl2: CutPlane "Cut Plane XZ" | data = dset1; quickplane = xz

Derived values
  int1: IntVolume "Absorbed power (mW)" on domains 2, 3, 5-8
    data = dset1
    table = tbl1
    expr = emw.Qh
    unit = W
    descr = Total power dissipation density

Tables
  tbl1: Table
    // Volume Integration 1
    freq (Hz) | Total power dissipation density (mW)
    4.28275e+14 | 92.1294

Plots
  pg1: PlotGroup3D "Electric Field (emw)" | data = dset1
    mslc1: Multislice | expr = emw.normE; descr = Electric field norm
  pg2: PlotGroup3D "Absorption" | data = dset1
    mslc1: Multislice | expr = emw.Qh; unit = W/m^3
  pg3: PlotGroup2D "2D Plot Group 3" | data = cpl2
    surf1: Surface | expr = emw.Qh; unit = W/m^3