// COMSOL Multiphysics 5.6.0.401 model "Temperature_layer.mph"
// Calculation of the temperature profile throughout a metal layer system
// Outline of the model tree

Parameters
  Rmax = 100*1e-6[m]  // Max radius of the domain
  h2 = 100e-9[m]  // metal layer thickness
  A_Cr = 7.43  // Increased absorbance due to the presence of the Cr layer, calculated using Fresnel coefficients (see Matlab codes)
  A_Au = 0.0351  // Absorbance of a h2 layer of gold, according to Fresnel coefficients
  OBJ_T = 0.7  // Objective transmittance
  Plaser0 = 17e-3[W]  // Laser power before the objective
  Rlaser = 4.75e-6[m]  // laser radius
  kappa_Au = 310[W/(m*K)]  // Thermal conductivity of gold
  kappa_Glass = 1[W/(m*K)]  // Thermal conductivity of glass
  kappa_Water = 0.6[W/(m*K)]  // Thermal conductivity of water
  lambda = 790e-9 [m]  // Wavelength
  n2 = 0.1520 + 4.8228i  // complex n of the metal
  n1 = 1.511  // n of the bottom medium
  n3 = 1.3294  // n of the upper medium
  c0 = 299792458[m/s]  // speed of light
  eps0 = 8.85418782e-12 [F/m]  // vacuum permittivity
  Plaser = OBJ_T*Plaser0  // Absorbed power
  I0 = A_Cr*Plaser/(pi*Rlaser^2)  // Effective irradiance, weighted by the Cr absorption increase
  E0 = sqrt(2*I0/(n1*c0*eps0))  // incoming E field
  delta = lambda/(4*pi*imag(n2))  // Skin depth
  t12 = 2*n1/(n1+n2)
  r12 = (n1-n2)/(n1+n2)
  r23 = (n2-n3)/(n2+n3)
  k0 = 2*pi/lambda  // wave number
  omega = k0*c0  // light angular frequency
  Pabs = Plaser*A_Au*A_Cr  // Power absorbed by the layer

Geometry
  geom1 "Geometry 1" (2D axisymmetric, length unit m)
    r1: Rectangle | size = {Rmax, h2}
    c1: Circle | pos = {0, h2}; r = Rmax; angle = 90
    c2: Circle | rot = 270; r = Rmax; angle = 90
    pol1: Polygon | source = table; table = {{0, h2/2}, {Rmax, h2/2}}
    pol2: Polygon | source = table; table = {{0, h2/4}, {Rmax, h2/4}}
    pol3: Polygon | source = table; table = {{0, 3*h2/4}, {Rmax, 3*h2/4}}
    fin: Finalize "Form Union"

Materials
  mat1: Common "Gold [solid]" on domains 2-5
    def "Basic"
      thermalconductivity = kappa_Au
      resistivity = res_solid_1(T[1/K])[ohm*m]
      thermalexpansioncoefficient = (alpha(T[1/K])[1/K]+(Tempref-293[K])*if(abs(T-Tempref)>1e-3,(alpha(T[1/K])[1/K]-alpha(Tempref[1/K])[1/K])/(T-Tempref),d(alpha(T[1/K])[1/K],T)))/(1+alpha(Tempref[1/K])[1/K]*(Tempref-293[K]))
      heatcapacity = C_solid_1(T[1/K])[J/(kg*K)]
      electricconductivity = sigma_solid_1(T[1/K])[S/m]
      HC = HC_solid_1(T[1/K])[J/(mol*K)]
      VP = VP_solid_1(T[1/K])[Pa]
      density = rho(T[1/K])[kg/m^3]
      TD = TD(T[1/K])[m^2/s]
      k_solid_1: Piecewise
        arg = T
        pieces = 
          {0.0, 14.0, 496.8118*T^1+41.00857*T^2-10.46095*T^3+0.5579006*T^4-0.009429161*T^5}
          {14.0, 45.0, 7977.526-554.7566*T^1+14.56751*T^2-0.1468484*T^3+3.231278E-4*T^4}
          {45.0, 85.0, 3568.586-199.4435*T^1+5.171042*T^2-0.06880706*T^3+4.612091E-4*T^4-1.23215E-6*T^5}
          {85.0, 1338.0, 330.6431-0.02536626*T^1-8.191375E-5*T^2+6.792908E-8*T^3-2.15362E-11*T^4}
      res_solid_1: Piecewise
        arg = T
        pieces = 
          {1.0, 25.0, 2.194815E-10+1.027514E-12*T^1-3.409278E-13*T^2+3.010164E-14*T^3}
          {25.0, 60.0, 1.390641E-9-1.228888E-10*T^1+4.182944E-12*T^2-2.773737E-14*T^3}
          {60.0, 400.0, -2.210068E-9+9.057611E-11*T^1-4.632985E-14*T^2+6.950205E-17*T^3}
          {400.0, 1338.0, -1.145028E-9+7.877041E-11*T^1-4.720065E-16*T^2+1.275961E-17*T^3}
      alpha: Piecewise
        arg = T
        pieces = 
          {0.0, 74.0, 1.109296E-5+4.023822E-8*T^1-2.476496E-10*T^2+7.218616E-13*T^3-7.164369E-16*T^4}
          {74.0, 133.0, 1.221837E-5+1.15298E-8*T^1-1.573678E-11*T^2}
          {133.0, 1003.0, 1.310696E-5+2.762787E-9*T^1}
      C_solid_1: Piecewise
        arg = T
        pieces = 
          {1.0, 19.0, -0.00123928239-0.00441956757*T^1+0.009034302*T^2-3.18296587E-4*T^3+2.36370938E-4*T^4-7.08894283E-6*T^5}
          {19.0, 65.0, 8.1569423-2.52007508*T^1+0.230328489*T^2-0.00515474658*T^3+5.12016163E-5*T^4-1.95565934E-7*T^5}
          {65.0, 175.0, -34.1155327+3.34286998*T^1-0.0295913944*T^2+1.25297244E-4*T^3-2.06742528E-7*T^4}
          {175.0, 293.0, 68.4176885+0.732431794*T^1-0.00385212177*T^2+9.78805378E-6*T^3-9.45977296E-9*T^4}
          {293.0, 750.0, 44.1873077+0.869961547*T^1-0.00352566559*T^2+7.00274406E-6*T^3-6.68842106E-9*T^4+2.47892502E-12*T^5}
          {750.0, 1338.0, 119.563448+0.0224965145*T^1+7.56344609E-6*T^2-2.04009664E-9*T^3}
      sigma_solid_1: Piecewise
        arg = T
        pieces = 
          {1.0, 25.0, 1/(3.010164E-14*T^3-3.409278E-13*T^2+1.027514E-12*T+2.194815E-10)}
          {25.0, 60.0, 1/(-2.773737E-14*T^3+4.182944E-12*T^2-1.228888E-10*T+1.390641E-09)}
          {60.0, 400.0, 1/(6.950205E-17*T^3-4.632985E-14*T^2+9.057611E-11*T-2.210068E-09)}
          {400.0, 1338.0, 1/(1.275961E-17*T^3-4.720065E-16*T^2+7.877041E-11*T-1.145028E-09)}
      HC_solid_1: Piecewise
        arg = T
        pieces = 
          {1.0, 19.0, -2.44097154E-4-8.70506722E-4*T^1+0.0017794552*T^2-6.26937673E-5*T^3+4.65571671E-5*T^4-1.3962849E-6*T^5}
          {19.0, 65.0, 0.94898601-0.401089453*T^1+0.040165923*T^2-8.81072159E-4*T^3+8.43834559E-6*T^4-3.07986332E-8*T^5}
          {65.0, 175.0, -6.71962115+0.65843357*T^1-0.00582851702*T^2+2.467937E-5*T^3-4.07213658E-8*T^4}
          {175.0, 293.0, 13.4759987+0.144264571*T^1-7.58739112E-4*T^2+1.927919E-6*T^3-1.86325863E-9*T^4}
          {293.0, 750.0, 8.70342291+0.171353335*T^1-6.94438145E-4*T^2+1.37930623E-6*T^3-1.31739516E-9*T^4+4.88265269E-13*T^5}
          {750.0, 1338.0, 23.5499996+0.00443106102*T^1+1.48974584E-6*T^2-4.01830816E-10*T^3}
      VP_solid_1: Piecewise | arg = T; pieces = {293.0, 1337.0, (exp((-1.93430000e+04/T-7.47900000e-01*log10(T)+1.20328100e+01)*log(10.0)))*1.33320000e+02}
      rho: Piecewise
        arg = T
        pieces = 
          {0.0, 86.0, 19471.18+0.1076816*T^1-0.00817626*T^2+3.830366E-5*T^3-7.266799E-8*T^4}
          {86.0, 1003.0, 19501.44-0.6933844*T^1-2.041944E-4*T^2+4.297982E-8*T^3}
      TD: Piecewise | arg = T; pieces = {293.0, 1003.0, 1.136193E-4+1.610427E-7*T^1-5.717826E-10*T^2+7.791874E-13*T^3-5.24857E-16*T^4+1.408362E-19*T^5}
    ThermalExpansion
      alphatan = CTE(T[1/K])[1/K]
      dL = (dL(T[1/K])-dL(Tempref[1/K]))/(1+dL(Tempref[1/K]))
      dL: Piecewise
        arg = T
        pieces = 
          {0.0, 92.0, -0.003245794-2.191545E-7*T^1+9.931873E-8*T^2-3.27165E-10*T^3+4.101526E-13*T^4}
          {92.0, 1003.0, -0.00376780533+1.179943E-5*T^1+3.792275E-9*T^2-5.959619E-13*T^3}
      CTE: Piecewise
        arg = T
        pieces = 
          {86.0, 200.0, 4.040319E-6+1.106436E-7*T^1-4.389255E-10*T^2+5.990814E-13*T^3}
          {200.0, 1003.0, 1.237291E-5+5.169284E-9*T^1-5.528527E-14*T^2}
    Enu "Young's modulus and Poisson's ratio"
      youngsmodulus = E(T[1/K])[Pa]
      poissonsratio = nu(T[1/K])
      E: Piecewise
        arg = T
        pieces = 
          {0.0, 93.0, 8.190431E10-2.049635E7*T^1-8937.063*T^2}
          {93.0, 293.0, 8.249999E10-3.153455E7*T^1+48127.92*T^2-72.49967*T^3+0.02725845*T^4}
          {293.0, 1280.0, 7.736733E10+425187.2*T^1-20070.07*T^2}
      nu: Piecewise | arg = T; pieces = {293.0, 1280.0, 0.4403494+8.884688E-6*T^1-1.158876E-8*T^2+1.023495E-11*T^3}
    KG "Bulk modulus and shear modulus"
      K = kappa(T[1/K])[Pa]
      G = mu(T[1/K])[Pa]
      mu: Piecewise | arg = T; pieces = {293.0, 1280.0, 2.682905E10+142041.4*T^1-7037.486*T^2}
      kappa: Piecewise | arg = T; pieces = {293.0, 1280.0, 2.224306E11-913189.7*T^1-37420.01*T^2}
  mat2: Common "H2O (water) [liquid]" on domains 6
    def "Basic"
      thermalconductivity = kappa_Water
      thermalexpansioncoefficient = (alpha_liquid_2(T[1/K])[1/K]+(Tempref-293[K])*if(abs(T-Tempref)>1e-3,(alpha_liquid_2(T[1/K])[1/K]-alpha_liquid_2(Tempref[1/K])[1/K])/(T-Tempref),d(alpha_liquid_2(T[1/K])[1/K],T)))/(1+alpha_liquid_2(Tempref[1/K])[1/K]*(Tempref-293[K]))
      heatcapacity = C_liquid_2(T[1/K])[J/(kg*K)]
      HC = HC_liquid_2(T[1/K])[J/(mol*K)]
      VP = VP_liquid_2(T[1/K])[Pa]
      density = rho_liquid_2(T[1/K])[kg/m^3]
      TD = TD_liquid_2(T[1/K])[m^2/s]
      dynamicviscosity = eta_liquid_1(T[1/K])[Pa*s]
      SurfF = SurfF(T[1/K])[N/m]
      k_liquid_2: Piecewise | arg = T; pieces = {275.0, 370.0, -0.9003748+0.008387698*T^1-1.118205E-5*T^2}
      alpha_liquid_2: Piecewise
        arg = T
        pieces = 
          {273.0, 283.0, 0.01032507-7.62815E-5*T^1+1.412474E-7*T^2}
          {283.0, 373.0, -0.002464185+1.947611E-5*T^1-5.049672E-8*T^2+4.616995E-11*T^3}
      C_liquid_2: Piecewise | arg = T; pieces = {293.0, 373.0, 4035.84079+0.492312034*T^1}
      HC_liquid_2: Piecewise | arg = T; pieces = {293.0, 373.0, 72.6451184+0.00886161577*T^1}
      VP_liquid_2: Piecewise | arg = T; pieces = {280.0, 600.0, (exp((-2.00512183e+03/T-5.56570000e-01*log10(T)+9.89879000e+00-1.11169009e+07/T^3)*log(10.0)))*1.33320000e+02}
      rho_liquid_2: Piecewise
        arg = T
        pieces = 
          {273.0, 283.0, 972.7584+0.2084*T^1-4.0E-4*T^2}
          {283.0, 373.0, 345.28+5.749816*T^1-0.0157244*T^2+1.264375E-5*T^3}
      TD_liquid_2: Piecewise | arg = T; pieces = {273.0, 333.0, 8.04E-8+2.0E-10*T^1}
      eta_liquid_1: Piecewise
        arg = T
        pieces = 
          {265.0, 293.0, 5.948859-0.08236196*T^1+4.287142E-4*T^2-9.938045E-7*T^3+8.65316E-10*T^4}
          {293.0, 353.0, 0.410191-0.004753985*T^1+2.079795E-5*T^2-4.061698E-8*T^3+2.983925E-11*T^4}
          {353.0, 423.0, 0.03625638-3.265463E-4*T^1+1.127139E-6*T^2-1.75363E-9*T^3+1.033976E-12*T^4}
      SurfF: Piecewise
        arg = T
        pieces = 
          {274.0, 568.0, 0.07739832+2.071003E-4*T^1-1.23147E-6*T^2+2.344068E-9*T^3-3.033107E-12*T^4+1.758716E-15*T^5}
          {568.0, 647.0, -109.3735+0.9291756*T^1-0.003154159*T^2+5.351438E-6*T^3-4.539449E-9*T^4+1.540327E-12*T^5}
    ThermalExpansion
      alphatan = CTE_liquid_2(T[1/K])[1/K]
      dL = (dL_liquid_2(T[1/K])-dL_liquid_2(Tempref[1/K]))/(1+dL_liquid_2(Tempref[1/K]))
      dL_liquid_2: Piecewise
        arg = T
        pieces = 
          {273.0, 283.0, 0.008486158-6.947021E-5*T^1+1.333373E-7*T^2}
          {283.0, 373.0, 0.232446637-0.002030447*T^1+5.510259E-6*T^2-4.395999E-9*T^3}
      CTE_liquid_2: Piecewise
        arg = T
        pieces = 
          {273.0, 283.0, -6.947321E-5+2.666746E-7*T^1}
          {283.0, 293.0, -0.01363715+8.893977E-5*T^1-1.43925E-7*T^2}
          {293.0, 373.0, -0.00203045+1.102052E-5*T^1-1.3188E-8*T^2}
  mat3: Common "White plate glass [solid]" on domains 1
    def "Basic"
      thermalconductivity = kappa_Glass
      heatcapacity = C(T[1/K])[J/(kg*K)]
      density = 2500
      k: Piecewise | arg = T; pieces = {293.0, 700.0, 0.6308749+0.001671153*T^1-7.469887E-7*T^2}
      C: Piecewise | arg = T; pieces = {115.0, 700.0, 127.237658+2.6769027*T^1-0.00180385796*T^2}

Physics
  ht: HeatTransfer "Heat Transfer in Solids" on all domains
    dependent variable T
    solid1: SolidHeatTransferModel "Solid 1" (default)
    init1: init "Initial Values 1" (default)
    axi1: AxialSymmetry (default)
    ins1: ThermalInsulation (default)
    hs1: HeatSource on domains 2-5
      Q0 = (r<Rlaser)*omega*eps0*imag(n2^2)*abs(E0*t12*(exp(j*k0*n2*z)+r23*exp(j*k0*n2*(2*h2-z)))/(1+r12*r23*exp(2*j*k0*n2*h2)))^2/2
    temp1: TemperatureBoundary "Temperature 1" on boundaries 12-17
      T0 = 2*Pabs/(4*pi*(kappa_Water+kappa_Glass)*Rmax)+293.15[K]

Mesh
  mesh1 "Mesh 1"
    size: MeshSizeDefault | hmax = 1.34E-5; hmin = 6.0E-8; hcurve = 0.3; hgrad = 1.3
    ftri1: FreeTri "Free Triangular 1" on remaining entities | smoothmaxiter = 4; smoothmaxdepth = 4

Studies
  std1 "Study 1"
    stat: Stationary

Solver configurations
  sol1 "Solution 1" (study std1)
    v1: Variables "Dependent Variables 1"
    s1: Stationary "Stationary Solver 1"
      fc1: FullyCoupled | linsolver = i1; initstep = 0.01; minstep = 1.0E-6; maxiter = 50
      i1: Iterative "AMG, temperature (ht)" | nlinnormuse = on; rhob = 20
        mg1: Multigrid | prefun = saamg; maxcoarsedof = 50000; saamgcompwise = on

Datasets
  dset1: Solution | solution = sol1
  rev1: Revolve2D "Revolution 2D" | data = dset1; startangle = -90; revangle = 225

Plots
  pg1: PlotGroup3D "Temperature, 3D (ht)" | data = rev1
    surf1: Surface | expr = T
  pg3: PlotGroup1D "Temperature profile" | data = dset1
    lngr1: LineGraph on boundaries 11 | expr = T-293.15[K]
  pg4: PlotGroup3D "Temperature, 3D (ht) 1" | data = rev1
    surf1: Surface | expr = ht.Qtot

Exports
  plot1: Plot