// COMSOL Multiphysics 5.6.0.401 model "Temperature_nanohole.mph"
// Outline of the model tree

Parameters
  Thickness = 95[nm]  // Thickness of the "gold" film
  Adhesion = 5[nm]  // Thickness of adhesion layer
  DiamHole = 100[nm]  // Diameter of the nanohole
  Lambda0 = 610[nm]  // Wavelength in vacuum
  Power = 1[mW]  // Laser power
  Index = 1.5  // Refractive index of input medium
  NA = 1  // Numerical aperture of the illumination
  Waist = 1.22*Lambda0/(2*NA)  // Waist of the beam
  Radius = 2[um]  // Radius of the computation box
  Height = 1[um]  // Height of the computation box
  SliceFilm = 50[nm]  // Distance between 2 mesh planes in film
  SliceMedium = 150[nm]  // Distance between 2 mesh planes in the medium
  SliceRadial = 150[nm]  // Distance between 2 mesh planes in radial direction
  Separation = 0
  SizeInfinite = 400[nm]  // Size of the Infinite Medium border
  f0 = c_const/Lambda0  // Frequency
  NSliceFilm = floor(Thickness/SliceFilm)  // Number of slices in the film
  NSliceMedium = floor((Height/2)/SliceMedium)  // Number of slices in the medium
  NSliceRadial = floor(Radius/SliceRadial)  // Number of radial slices

Coordinate systems
  ie1: InfiniteElement "Domaine de type élément infini 1" on domains 1-13, 18, 21-32 | ScalingType = Cylindrical

Geometry
  geom1 "Géométrie 1" (3D, length unit µm)
    cyl1: Cylinder "ComputationBoxWithInfinite"
      pos = {0, 0, -(Height+2*SizeInfinite)/2}
      layername = Couche 1
      layer = SizeInfinite
      layerbottom = on
      layertop = on
      r = Radius+SizeInfinite
      h = Height+2*SizeInfinite
    cyl2: Cylinder "Film"
      pos = {0, 0, -(Thickness+Adhesion)/2}
      layername = Layer 1
      layer = Thickness
      layerside = off
      layertop = on
      r = Radius+SizeInfinite
      h = Thickness+Adhesion
    cyl3: Cylinder "Nanohole" | pos = {0, 0, -(Thickness+Adhesion)/2}; r = DiamHole/2; h = Thickness+Adhesion
    pt1: Point | p = {, , (Thickness+Adhesion)/2}
    ls1: LineSegment "Segment linéaire 1" | vertex1 = pt1(1) points 1; vertex2 = cyl2(1) points 12
    rot1: Rotate "Rotation 1" | input = ls1; rot = range(0,15,360)
    fin: Finalize "Constituer une union"

Materials
  mat2: Common "Air" on no domains
    def "Basic"
      thermalexpansioncoefficient = alpha_p(pA,T)
      molarmass = 0.02897[kg/mol]
      bulkviscosity = muB(T)
      relpermeability = 1
      relpermittivity = 1
      dynamicviscosity = eta(T)
      ratioofspecificheat = 1.4
      electricconductivity = 0[S/m]
      heatcapacity = Cp(T)
      density = rho(pA,T)
      thermalconductivity = k(T)
      soundspeed = cs(T)
      eta: Piecewise | arg = T; pieces = {200.0, 1600.0, -8.38278E-7+8.35717342E-8*T^1-7.69429583E-11*T^2+4.6437266E-14*T^3-1.06585607E-17*T^4}; argunit = K; fununit = Pa*s
      Cp: Piecewise | arg = T; pieces = {200.0, 1600.0, 1047.63657-0.372589265*T^1+9.45304214E-4*T^2-6.02409443E-7*T^3+1.2858961E-10*T^4}; argunit = K; fununit = J/(kg*K)
      rho: Analytic | expr = pA*0.02897/R_const[K*mol/J]/T; args = {pA, T}; argunit = Pa,K; fununit = kg/m^3
      k: Piecewise | arg = T; pieces = {200.0, 1600.0, -0.00227583562+1.15480022E-4*T^1-7.90252856E-8*T^2+4.11702505E-11*T^3-7.43864331E-15*T^4}; argunit = K; fununit = W/(m*K)
      cs: Analytic | expr = sqrt(1.4*R_const[K*mol/J]/0.02897*T); args = T; argunit = K; fununit = m/s
      an1: Analytic | funcname = alpha_p; expr = -1/rho(pA,T)*d(rho(pA,T),T); args = {pA, T}; argunit = Pa,K; fununit = 1/K
      an2: Analytic "Analytic 2a" | funcname = muB; expr = 0.6*eta(T); args = T; argunit = K; fununit = Pa*s
    RefractiveIndex
      n = 1
      ki = 0
    NonlinearModel
      BA = (def.gamma+1)/2
    idealGas
      Rs = R_const/Mn
      heatcapacity = Cp(T)
      ratioofspecificheat = 1.4
      molarmass = 0.02897
      Cp: Piecewise | arg = T; pieces = {200.0, 1600.0, 1047.63657-0.372589265*T^1+9.45304214E-4*T^2-6.02409443E-7*T^3+1.2858961E-10*T^4}; argunit = K; fununit = J/(kg*K)
  mat3: Common "Water, liquid" on domains 9-12, 17-20, 25, 26, 31, 32
    def "Basic"
      thermalexpansioncoefficient = alpha_p(T)
      bulkviscosity = muB(T)
      dynamicviscosity = eta(T)
      ratioofspecificheat = gamma_w(T)
      electricconductivity = 5.5e-6[S/m]
      heatcapacity = Cp(T)
      density = rho(T)
      thermalconductivity = k(T)
      soundspeed = cs(T)
      eta: Piecewise
        arg = T
        pieces = 
          {273.15, 413.15, 1.3799566804-0.021224019151*T^1+1.3604562827E-4*T^2-4.6454090319E-7*T^3+8.9042735735E-10*T^4-9.0790692686E-13*T^5+3.8457331488E-16*T^6}
          {413.15, 553.75, 0.00401235783-2.10746715E-5*T^1+3.85772275E-8*T^2-2.39730284E-11*T^3}
        argunit = K
        fununit = Pa*s
      Cp: Piecewise | arg = T; pieces = {273.15, 553.75, 12010.1471-80.4072879*T^1+0.309866854*T^2-5.38186884E-4*T^3+3.62536437E-7*T^4}; argunit = K; fununit = J/(kg*K)
      rho: Piecewise
        arg = T
        smooth = contd1
        pieces = 
          {273.15, 293.15, 6.3092789034e-05*T^3-0.0603676398829*T^2+18.9229382407066*T-950.704055329848}
          {293.15, 373.15, 1.0335053319e-05*T^3-0.0133950656345*T^2+4.96928883266*T+432.257114008512}
        argunit = K
        fununit = kg/m^3
      k: Piecewise | arg = T; pieces = {273.15, 553.75, -0.869083936+0.00894880345*T^1-1.58366345E-5*T^2+7.97543259E-9*T^3}; argunit = K; fununit = W/(m*K)
      cs: Interpolation | table = {{273, 1403}, {278, 1427}, {283, 1447}, {293, 1481}, {303, 1507}, {313, 1526}, {323, 1541}, {333, 1552}, {343, 1555}, {353, 1555}, {363, 1550}, {373, 1543}}; interp = piecewisecubic; argunit = K; fununit = m/s
      an1: Analytic | funcname = alpha_p; expr = -1/rho(T)*d(rho(T),T); args = T; argunit = K; fununit = 1/K
      an2: Analytic | funcname = gamma_w; expr = 1+(T/Cp(T))*(alpha_p(T)*cs(T))^2; args = T; argunit = K; fununit = 1
      an3: Analytic | funcname = muB; expr = 2.79*eta(T); args = T; argunit = K; fununit = Pa*s
    RefractiveIndex "Indice de réfraction"
      n = 1.33
      ki = 0
  mat5: Common "Glass (quartz)" on domains 1-4, 13, 14, 16, 21, 22, 27, 28
    def "Basic"
      relpermeability = 1
      electricconductivity = 1e-14[S/m]
      relpermittivity = 4.2
      density = 2210[kg/m^3]
      thermalconductivity = 1.4[W/(m*K)]
      heatcapacity = 730[J/(kg*K)]
    RefractiveIndex
      n = 1.5
      ki = 0
  mat1: Common "Au (Gold) (Johnson and Christy 1972: n,k 0.188-1.937 µm)" on domains 7, 8, 16, 24, 30
    def "Basic"
      thermalconductivity = 318
      density = 19300
      heatcapacity = 125
    RefractiveIndex
      n = n_interp(c_const/f0)
      ki = k_interp(c_const/f0)
      int1: Interpolation "Refractive index"
        funcname = n_interp
        table = 
          {1.879E-7, 1.28}
          {1.916E-7, 1.32}
          {1.953e-07, 1.34}
          {1.993E-7, 1.33}
          {2.033E-7, 1.33}
          {2.073E-7, 1.3}
          {2.119e-07, 1.3}
          {2.164E-7, 1.3}
          {2.214E-7, 1.3}
          {2.262E-7, 1.31}
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        interp = piecewisecubic
        argunit = m
        fununit = 1
      int2: Interpolation "Refractive index, imaginary part"
        funcname = k_interp
        table = 
          {1.879E-7, 1.188}
          {1.916E-7, 1.203}
          {1.953e-07, 1.226}
          {1.993E-7, 1.251}
          {2.033E-7, 1.277}
          {2.073E-7, 1.304}
          {2.119e-07, 1.35}
          {2.164E-7, 1.387}
          {2.214E-7, 1.427}
          {2.262E-7, 1.46}
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        interp = piecewisecubic
        argunit = m
        fununit = 1
  mat7: Common "Ag (Silver) (Johnson and Christy 1972: n,k 0.188-1.937 µm)" on no domains
    def "Basic"
      heatcapacity = 238
      thermalconductivity = 429
      density = 10500
    RefractiveIndex
      n = n_interp(c_const/f0)
      ki = k_interp(c_const/f0)
      int1: Interpolation "Refractive index"
        funcname = n_interp
        table = 
          {1.879E-7, 1.07}
          {1.916E-7, 1.1}
          {1.953e-07, 1.12}
          {1.993E-7, 1.14}
          {2.033E-7, 1.15}
          {2.073E-7, 1.18}
          {2.119e-07, 1.2}
          {2.164E-7, 1.22}
          {2.214E-7, 1.25}
          {2.262E-7, 1.26}
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        interp = piecewisecubic
        argunit = m
        fununit = 1
      int2: Interpolation "Refractive index, imaginary part"
        funcname = k_interp
        table = 
          {1.879E-7, 1.212}
          {1.916E-7, 1.232}
          {1.953e-07, 1.255}
          {1.993E-7, 1.277}
          {2.033E-7, 1.296}
          {2.073E-7, 1.312}
          {2.119e-07, 1.325}
          {2.164E-7, 1.336}
          {2.214E-7, 1.342}
          {2.262E-7, 1.344}
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        interp = piecewisecubic
        argunit = m
        fununit = 1
  mat8: Common "Al (Aluminium) (RakiÄ‡ 1995: 0.00012399-200 µm)" on no domains
    def "Basic"
      heatcapacity = 921
      thermalconductivity = 237
      density = 2600
    RefractiveIndex
      n = n_interp(c_const/f0)
      ki = k_interp(c_const/f0)
      int1: Interpolation "Refractive index"
        funcname = n_interp
        table = 
          {1.2399E-10, 0.9999946}
          {1.3051E-10, 0.999994}
          {1.3776E-10, 0.999993}
          {1.5498E-10, 0.999991}
          {1.7712E-10, 0.999989}
          {2.0664e-10, 0.999984}
          {2.4797E-10, 0.99998}
          {3.0996E-10, 0.99997}
          {3.5424E-10, 0.99995}
          {4.1328e-10, 0.99994}
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        interp = piecewisecubic
        argunit = m
        fununit = 1
      int2: Interpolation "Refractive index, imaginary part"
        funcname = k_interp
        table = 
          {1.2399E-10, 8.241E-8}
          {1.3051E-10, 1.272E-7}
          {1.3776E-10, 1.2488E-7}
          {1.5498E-10, 1.9173E-7}
          {1.7712E-10, 3.1463E-7}
          {2.0664e-10, 5.5102E-7}
          {2.4797E-10, 1.0726E-6}
          {3.0996E-10, 2.4843E-6}
          {3.5424E-10, 4.0484E-6}
          {4.1328e-10, 7.1408E-6}
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        interp = piecewisecubic
        argunit = m
        fununit = 1
  mat9: Common "Ti (Titanium) (Johnson and Christy 1974: n,k 0.188-1.937 µm)" on no domains
    def "Basic"
      heatcapacity = 544
      thermalconductivity = 22
      density = 4510
    RefractiveIndex
      n = n_interp(c_const/f0)
      ki = k_interp(c_const/f0)
      int1: Interpolation "Refractive index"
        funcname = n_interp
        table = 
          {1.88E-7, 1.1}
          {1.92E-7, 1.16}
          {1.95e-07, 1.22}
          {1.99E-7, 1.25}
          {2.03E-7, 1.27}
          {2.07E-7, 1.31}
          {2.12E-7, 1.31}
          {2.16e-07, 1.32}
          {2.21e-07, 1.32}
          {2.26e-07, 1.32}
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        interp = piecewisecubic
        argunit = m
        fununit = 1
      int2: Interpolation "Refractive index, imaginary part"
        funcname = k_interp
        table = 
          {1.88E-7, 1.62}
          {1.92E-7, 1.64}
          {1.95e-07, 1.66}
          {1.99E-7, 1.68}
          {2.03E-7, 1.69}
          {2.07E-7, 1.69}
          {2.12E-7, 1.68}
          {2.16e-07, 1.67}
          {2.21e-07, 1.66}
          {2.26e-07, 1.66}
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        interp = piecewisecubic
        argunit = m
        fununit = 1
  mat6: Common "Chromium (Cr) (Johnson and Christy 1974: n,k 0.188-1.937 µm)" on domains 5, 6, 15, 23, 29
    def "Basic"
      heatcapacity = 460
      thermalconductivity = 90
      density = 7150
    RefractiveIndex
      n = n_interp(c_const/f0)
      ki = k_interp(c_const/f0)
      int1: Interpolation "Refractive index"
        funcname = n_interp
        table = 
          {1.88E-7, 1.28}
          {1.92E-7, 1.31}
          {1.95e-07, 1.35}
          {1.99E-7, 1.39}
          {2.03E-7, 1.43}
          {2.07E-7, 1.46}
          {2.12E-7, 1.46}
          {2.16e-07, 1.47}
          {2.21e-07, 1.45}
          {2.26e-07, 1.43}
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        interp = piecewisecubic
        argunit = m
        fununit = 1
      int2: Interpolation "Refractive index, imaginary part"
        funcname = k_interp
        table = 
          {1.88E-7, 1.64}
          {1.92E-7, 1.65}
          {1.95e-07, 1.68}
          {1.99E-7, 1.7}
          {2.03E-7, 1.7}
          {2.07E-7, 1.71}
          {2.12E-7, 1.72}
          {2.16e-07, 1.72}
          {2.21e-07, 1.73}
          {2.26e-07, 1.74}
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        interp = piecewisecubic
        argunit = m
        fununit = 1
  mat10: Common "Ge (Germanium) (Aspnes and Studna 1983: n,k 0.21-0.83 µm)" on no domains
    def "Basic"
      heatcapacity = 318
      thermalconductivity = 60
      density = 5300
    RefractiveIndex
      n = n_interp(c_const/f0)
      ki = k_interp(c_const/f0)
      int1: Interpolation "Refractive index"
        funcname = n_interp
        table = 
          {2.066e-07, 1.023}
          {2.101E-7, 1.108}
          {2.138e-07, 1.209}
          {2.175e-07, 1.31}
          {2.214E-7, 1.36}
          {2.254e-07, 1.38}
          {2.296E-7, 1.383}
          {2.339E-7, 1.371}
          {2.384E-7, 1.364}
          {2.431E-7, 1.37}
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        interp = piecewisecubic
        argunit = m
        fununit = 1
      int2: Interpolation "Refractive index, imaginary part"
        funcname = k_interp
        table = 
          {2.066e-07, 2.774}
          {2.101E-7, 2.831}
          {2.138e-07, 2.873}
          {2.175e-07, 2.866}
          {2.214E-7, 2.846}
          {2.254e-07, 2.842}
          {2.296E-7, 2.854}
          {2.339E-7, 2.897}
          {2.384E-7, 2.973}
          {2.431E-7, 3.073}
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        interp = piecewisecubic
        argunit = m
        fununit = 1

Physics
  ewbe: ElectromagneticWavesBeamEnvelopes "Ondes électromagnétiques, enveloppes de faisceau" on all domains
    dependent variable E1 = {E1x, E1y, E1z}
    WaveVector.dirCount = BiDirectionality
    WaveVector.k1 = {0, 0, ewbe.k0}
    WaveVector.k2 = {ewbe.k1x, ewbe.k1y, -ewbe.k1z}
    webe1: WaveEquationBeamEnvelopes "Equation d'onde, enveloppes de faisceau 1" (default)
    pec1: PerfectElectricConductor "Conducteur électrique parfait 1" (default)
    init1: init "Valeurs initiales 1" (default)
    sctr2: Scattering "Scattering Boundaries" on boundaries 40, 41, 43, 44, 46, 47, 49, 50, 55, 111-114, 138, 141, 144, 147
    sctr1: Scattering "Input EM Field" on boundaries 42
      inputWave = FirstWave
      IncidentField = GaussianBeam
      E0i = {1000*exp((-(x^2+y^2))/Waist^2), 0, 0}
      w0 = Waist
      p0 = Index*Height/2
      Eg0 = {E0, 0, 0}
      inputQuantity = Power
      inputPower = Power
      Eg0NN = {1, 0, 0}
  ht: HeatTransfer "Transfert de chaleur dans des solides" on all domains
    dependent variable T
    solid1: SolidHeatTransferModel "Solide 1" (default)
    init1: init "Valeurs initiales 1" (default)
    ins1: ThermalInsulation "Isolation thermique 1" (default)
    temp1: TemperatureBoundary "Température 1" on boundaries 2-5, 7, 8, 12, 13, 17, 18, 21, 22, 27, 28, 31, 32, 39, 56, 92, 93, 95, 98, 101, 104, 107, 109, 136, 152-158

Multiphysics
  emh1: ElectromagneticHeating "Chauffage électromagnétique 1" on all domains | EMHeat_physics = ewbe; Heat_physics = ht

Mesh
  mesh1 "Maillage 1"
    size: MeshSizeDefault "Taille" | hmax = 0.48; hmin = 0.0864; hcurve = 0.6; hnarrow = 0.5; hgrad = 1.5
    map1: Map "Quadrangle structuré Film" on boundaries 12, 13, 17, 18, 98, 101, 155, 156
      dis1: Distribution on edges 18, 19, 28, 30, 33, 35, 66, 68, 74, 76, 82, 84, 132, 205, 236, 237, 242, 243, 248, 249, 271-274
        numelem = 1
      dis2: Distribution on edges 202 | numelem = NSliceFilm
      dis3: Distribution on edges 200 | numelem = 2
    map5: Map "Quadrangle structuré Media" on boundaries 7, 8, 21, 22, 95, 104, 154, 157
      dis1: Distribution on edges 198, 204 | numelem = NSliceMedium
    map2: Map "Quadrangle structuré Infinite" on boundaries 2, 3, 27, 28, 92, 107, 153, 158
      dis1: Distribution on edges 196, 206 | numelem = 3
    map3: Map "Quadrangle structuré InfiniteRadial" on boundaries 178
      dis1: Distribution on edges 257 | type = predefined; elemcount = 3
    map4: Map "Quadrangle structuré InfiniteRadial2" on boundaries 24, 25, 33-36, 61, 62, 65, 66, 69, 70, 105, 148, 169-177
    swe2: Sweep "Extrusion Infinite1" on domains 5-8, 23, 24, 29, 30
    swe1: Sweep "Extrusion Infinite2" on domains 1-4, 9-12, 21, 22, 25-28, 31, 32
    map6: Map "Quadrangle structuré FilmRadial" on boundaries 168
      dis1: Distribution on edges 231 | numelem = NSliceRadial
    map7: Map "Quadrangle structuré FilmRadial2" on boundaries 51, 52, 57-60, 63, 64, 67, 68, 71, 72, 115, 133, 159-167
    swe3: Sweep "Extrusion Film" on domains 15, 16
    ftri1: FreeTri "Triangle libre Hole" on boundaries 79-90, 119-130
      dis1: Distribution on edges 169 | numelem = 2
    swe4: Sweep "Extrusion Hole" on domains 19, 20
    swe5: Sweep "Extrusion 5" on remaining entities

Studies
  std1 "Etude 1"
    freq: Frequency "Domaine fréquentiel" | punit = Hz; plist = f0; solve for = {ewbe}
    stat: Stationary "Stationnaire" | solve for = {ht}

Solver configurations
  sol1 "Solution 1" (study std1)
    v1: Variables "Variables dépendantes 1"
    s1: Stationary "Solveur stationnaire 1"
      dDef: Direct
      p1: Parametric "Paramétrique 1" | pname = freq; plistarr = f0; punit = Hz; pcontinuationmode = no
      fc1: FullyCoupled "Couplage fort 1" | linsolver = dDef
    su1: StoreSolution "Solution Store 1"
    v2: Variables "Variables dépendantes 2" | initmethod = sol; notsolmethod = sol
    s2: Stationary "Solveur stationnaire 2"
      fc1: FullyCoupled "Couplage fort 1" | linsolver = d1; initstep = 0.01; minstep = 1.0E-6; maxiter = 50
      d1: Direct "Direct, température (ht)" | linsolver = pardiso; pivotperturb = 1.0E-13

Datasets
  dset1: Solution | solution = sol1
  cpl1: CutPlane | data = dset1

Derived values
  int1: IntVolume "Volume Integration 1" on domains 15, 16, 19, 20 | data = dset1; table = tbl6; expr = ht.Qtot; unit = mW

Tables
  tbl1: Table
    // Intégration sur volume 1
    freq (Hz) | Source de chaleur totale (mW) | Source de chaleur totale (mW)
    5.45077e+14 | 0.36486 | 0.605111
  tbl4: Table
    // Volume Maximum 1
    Total heat source (W/m^3) | Total heat source (W/m^3)
    388.504 | 3.61099e+18

Plots
  pg1: PlotGroup3D "Electric Field (ewbe)" | data = dset1
    mslc1: Multislice "Electric Field" | expr = ewbe.normE
  pg2: PlotGroup3D "Temperature (ht)" | data = dset1
    surf1: Surface | expr = T
  pg3: PlotGroup3D "Isothermal Contours (ht)" | data = dset1
    iso1: Isosurface | expr = T; levelrounding = off
  pg4: PlotGroup2D "EField" | data = cpl1
    surf1: Surface | expr = ewbe.normE; unit = V/m; descr = Electric field norm
  pg5: PlotGroup2D "HSD" | data = cpl1
    surf1: Surface | expr = ht.Qtot; unit = W/m^3
  pg7: PlotGroup2D "log(HSD)" | data = cpl1
    surf1: Surface | expr = log10(ht.Qtot)
  pg6: PlotGroup2D "Temperature" | data = cpl1
    surf1: Surface | expr = T; unit = K
    con1: Contour | expr = T